# OpenSim document version 30000
MarkerSet generic:
  Marker LASIS: pelvis (0.5941 0.7001 0.297)
  Marker LPSIS: pelvis (0.5304 0.621 0.2773)
  Marker RPSIS: pelvis (0.5488 0.4961 0.2804)
  Marker SACRAL: pelvis (0.5095 0.3887 0.2962)
  Marker RASIS: pelvis (0.5851 0.487 0.1712)
  Marker RGT: femur_r (0.5105 0.2175 0.2848)
  Marker RTHS: femur_r (0.5691 0.3024 0.2813)
  Marker RTHF: femur_r (0.5851 0.487 0.1712)
  Marker RTHM: femur_r (0.5321 0.3006 0.2947)
  Marker RTHI: femur_r (0.5095 0.3887 0.2963)
  Marker RLEPI: femur_r (0.5487 0.4961 0.2806)
  Marker RMEPI: femur_r (0.5567 0.7041 0.2915)
  Marker RSHS: tibia_r (0.5851 0.487 0.1712)
  Marker RSHM: tibia_r (0.5851 0.487 0.1712)
  Marker RSHF: tibia_r (0.5852 0.4871 0.1712)
  Marker RSHI: tibia_r (0.5306 0.6211 0.2777)
  Marker RLM: tibia_r (0.5851 0.487 0.1712)
  Marker RMM: tibia_r (0.5852 0.487 0.1712)
  Marker RCA: calcn_r (0.5095 0.3887 0.2964)
  Marker RLTOE: calcn_r (0.5322 0.3007 0.2947)
  Marker RMTOE: calcn_r (0.5692 0.3024 0.2814)
  Marker RTOETIP: calcn_r (0.5306 0.6211 0.2777)
