# OpenSim document version 30000
ScaleTool subject1:
  mass: 65
  height: 178
  age: 3
  GenericModelMaker subject1:
    model_file: /Users/Cristian/Documents/MATLAB/Phd/Ross_data/example/model.osim
    marker_set_file: /Users/Cristian/Documents/MATLAB/Phd/Ross_data/example/markerSet.xml
  ModelScaler subject1:
    scaling_order: measurements
    marker_file: Static01Subject.trc
    time_range: [0 2]
    preserve_mass_distribution: true
    MeasurementSet: file=/Users/Cristian/Documents/MATLAB/Phd/Ross_data/example/measurementSet.xml
  MarkerPlacer subject1:
    marker_file: Static01Subject.trc
    time_range: [0 2]
    output_model_file: /Users/Cristian/Documents/MATLAB/Phd/Data1/subject1/results/subject1modelScaled.osim
    output_motion_file: /Users/Cristian/Documents/MATLAB/Phd/Data1/subject1/results/subject1static.mot
    output_marker_file: /Users/Cristian/Documents/MATLAB/Phd/Data1/subject1/results/subject1markersScaled.xml
    max_marker_movement: -1
    IKTaskSet: file=/Users/Cristian/Documents/MATLAB/Phd/Ross_data/example/tasksScale.xml
