# OpenSim document version 40000
Model TugOfWar:
  gravity: 0 0 0
  Ground: meshes=(ground.vtp anchor1.vtp anchor2.vtp)
  BodySet:
    Body Block: mass=20 [kg] mass_center=(0 0 0) meshes=block.vtp
  JointSet:
    FreeJoint free_Block: socket_parent_frame=/ground socket_child_frame=/bodyset/Block
      Coordinate free_Block_coord_0
      Coordinate free_Block_coord_1
      Coordinate free_Block_coord_2
      Coordinate free_Block_coord_3
      Coordinate free_Block_coord_4
      Coordinate free_Block_coord_5
  ControllerSet:
    PrescribedController LinearRamp_Controller: actuator_list=(muscle1 muscle2)
      FunctionSet ControlFunctions: LinearFunction(coefficients=-0.333333 1) LinearFunction(coefficients=0.316667 0.05)
  ForceSet:
    Thelen2003Muscle muscle1: min_control=0.01 max_control=1 max_isometric_force=1000 optimal_fiber_length=0.25
        tendon_slack_length=0.1 pennation_angle_at_optimal=0 [radians]
      PathPoint point1: ground (0 0.05 -0.35)
      PathPoint point2: Block (0 0 -0.05)
    Thelen2003Muscle muscle2: min_control=0.01 max_control=1 max_isometric_force=1000 optimal_fiber_length=0.25
        tendon_slack_length=0.1 pennation_angle_at_optimal=0
      PathPoint point1: ground (0 0.05 0.35)
      PathPoint point2: Block (0 0 0.05)
