# OpenSim document version 30000
MarkerSet generic:
  Marker racr: torso (0 0.422 0.15)
  Marker lacr: torso (0 0.422 -0.15)
  Marker c7: torso (-0.09 0.415 0)
  Marker jug: torso (0.05 0.385 0)
  Marker rua: humerus_r (0.01 -0.13 0.05)
  Marker rlel: humerus_r (-0.01 -0.29 0.03)
  Marker rmel: humerus_r (0 -0.28 -0.045)
  Marker rfa: radius_r (0 -0.114874 0.05)
  Marker rdr: radius_r (-0.012 -0.237 0.048)
  Marker rdu: ulna_r (-0.04 -0.245 0.016)
  Marker lua: humerus_l (0.01 -0.13 -0.05)
  Marker llel: humerus_l (-0.01 -0.29 -0.03)
  Marker lmel: humerus_l (0 -0.28 0.045)
  Marker lfa: radius_l (0 -0.114874 -0.05)
  Marker ldr: radius_l (-0.012 -0.237 -0.048)
  Marker ldu: ulna_l (-0.04 -0.245 -0.016)
  Marker s2: pelvis (-0.185 0.02 -0.000396304)
  Marker ric: pelvis (-0.07 0.07 0.15)
  Marker lic: pelvis (-0.07 0.07 -0.15)
  Marker rasi: pelvis (0.015 0.01 0.125)
  Marker lasi: pelvis (0.015 0.01 -0.125)
  Marker rpsi: pelvis (-0.165 0.04 0.05)
  Marker lpsi: pelvis (-0.165 0.04 -0.05)
  Marker rgt: femur_r (-0.01 -0.03 0.085)
  Marker rth1: femur_r (-0.005 -0.11 0.1)
  Marker rth2: femur_r (0.0177824 -0.19 0.095)
  Marker rth3: femur_r (0.00686701 -0.27 0.085)
  Marker rth4: femur_r (0.0543592 -0.19 0.09)
  Marker rlfc: femur_r (0 -0.425 0.055)
  Marker rmfc: femur_r (0 -0.43 -0.06)
  Marker rsh1: tibia_r (-0.00462888 -0.135299 0.06)
  Marker rsh2: tibia_r (0.00881342 -0.22039 0.06)
  Marker rsh3: tibia_r (-0.00854137 -0.298501 0.06)
  Marker rsh4: tibia_r (0.0434856 -0.222583 0.05)
  Marker rlmal: tibia_r (-0.005 -0.415 0.055)
  Marker rmmal: tibia_r (0.006 -0.39 -0.04)
  Marker rcal: calcn_r (-0.025 0.02 -0.005)
  Marker rtoe: calcn_r (0.27 0.02 0.01)
  Marker rmt5: calcn_r (0.17 0 0.065)
  Marker rmt1: calcn_r (0.176275 0 -0.0535013)
  Marker lgt: femur_l (-0.01 -0.03 -0.085)
  Marker lth1: femur_l (-0.005 -0.11 -0.1)
  Marker lth2: femur_l (0.0177824 -0.19 -0.095)
  Marker lth3: femur_l (0.00686701 -0.27 -0.085)
  Marker lth4: femur_l (0.0543592 -0.19 -0.09)
  Marker llfc: femur_l (0 -0.43 -0.055)
  Marker lmfc: femur_l (0 -0.43 0.06)
  Marker lsh1: tibia_l (-0.00462888 -0.135299 -0.06)
  Marker lsh2: tibia_l (0.00881342 -0.22039 -0.06)
  Marker lsh3: tibia_l (-0.00854137 -0.298501 -0.06)
  Marker lsh4: tibia_l (0.0434856 -0.222583 -0.05)
  Marker llmal: tibia_l (-0.005 -0.415 -0.055)
  Marker lmmal: tibia_l (0.006 -0.39 0.04)
  Marker lcal: calcn_l (-0.025 0.02 0.005)
  Marker ltoe: calcn_l (0.27 0.02 -0.01)
  Marker lmt5: calcn_l (0.17 0 -0.065)
  Marker lmt1: calcn_l (0.173737 0 0.0544933)
