# OpenSim document version 30000
MeasurementSet generic:
  Measurement pelvis_x: apply=true
    MarkerPair: markers=(RPSIS RASIS)
    MarkerPair: markers=(LPSIS LASIS)
    BodyScale pelvis: axes=X
  Measurement pelvis_yz: apply=true
    MarkerPair: markers=(RASIS LASIS)
    MarkerPair: markers=(RASIS RLEPI)
    BodyScale pelvis: axes=(Y Z)
  Measurement thigh_r_y: apply=true
    MarkerPair: markers=(RASIS RLEPI)
    BodyScale femur_r: axes=Y
    BodyScale patella_r: axes=Y
  Measurement thigh_r_xz: apply=true
    MarkerPair: markers=(RLEPI RMEPI)
    BodyScale femur_r: axes=(X Z)
    BodyScale patella_r: axes=(X Z)
  Measurement shank_r_y: apply=true
    MarkerPair: markers=(RLEPI RLM)
    BodyScale tibia_r: axes=Y
    BodyScale talus_r: axes=Y
  Measurement shank_r_xz: apply=true
    MarkerPair: markers=(RLM RMM)
    BodyScale tibia_r: axes=(X Z)
    BodyScale talus_r: axes=(X Z)
  Measurement foot_r_xy: apply=true
    MarkerPair: markers=(RCA RTOETIP)
    BodyScale calcn_r: axes=(X Y)
    BodyScale toes_r: axes=(X Y)
  Measurement foot_r_z: apply=true
    MarkerPair: markers=(RMTOE RLTOE)
    BodyScale calcn_r: axes=Z
    BodyScale toes_r: axes=Z
