# OpenSim document version 30000
IKTaskSet generic:
  IKMarkerTask LASIS: apply=true weight=10
  IKMarkerTask LPSIS: apply=true weight=10
  IKMarkerTask RPSIS: apply=true weight=10
  IKMarkerTask SACRA: apply=true weight=1
  IKMarkerTask RASIS: apply=true weight=50
  IKMarkerTask RGT: apply=false weight=10
  IKMarkerTask RTHS: apply=true weight=50
  IKMarkerTask RTHF: apply=false weight=50
  IKMarkerTask RTHM: apply=true weight=50
  IKMarkerTask RTHI: apply=false weight=10
  IKMarkerTask RLEPI: apply=true weight=50
  IKMarkerTask RMEPI: apply=false weight=50
  IKMarkerTask RSHS: apply=true weight=20
  IKMarkerTask RSHM: apply=false weight=1
  IKMarkerTask RSHF: apply=false weight=1
  IKMarkerTask RSHI: apply=true weight=50
  IKMarkerTask RLM: apply=true weight=50
  IKMarkerTask RMM: apply=true weight=50
  IKMarkerTask RCA: apply=true weight=50
  IKMarkerTask RLTOE: apply=false weight=1
  IKMarkerTask RMTOE: apply=false weight=1
  IKMarkerTask RTOETIP: apply=false weight=1
